*Heading
** Job name: Plate_hole_1 Model name: Model-1
** Generated by: Abaqus/CAE 2022
*Preprint, echo=NO, model=NO, history=NO, contact=NO
**
** PARTS
**
*Part, name=plate_1
*Node
      1,   9.33578587,   4.66421413,           0.
      2,   52.3357849,   4.66421413,           0.
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*Element, type=S4R
  1,    1,   29,  610,  136
  2,   29,   30,  611,  610
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*Nset, nset=all, generate
    1,  3868,     1
*Elset, elset=all, generate
    1,  3713,     1
*Nset, nset=left
  13,  14,  18,  20, 377, 378
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*Elset, elset=left
 1722, 1765, 1808, 1851, 1894, 1937
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*Nset, nset=right
   2,   3,   6,  12,  71,  72
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*Elset, elset=right
   43,   86,  129,  172,  215,  258
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*Nset, nset=hole
  21,  22,  23,  24,  25,  26
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*Elset, elset=hole
 3456, 3462, 3468, 3474, 3480, 3491
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*Orientation, name=Ori-1
1., 0., 0., 0., 1., 0.
3, 0.
** Region: (CompositeLayup-1-1: Generated From Layup)
*Elset, elset=CompositeLayup-1-1, generate
    1,  3713,     1
** Section: CompositeLayup-1-1
*Shell Section, elset=CompositeLayup-1-1, composite, orientation=Ori-1, layup=CompositeLayup-1, symmetric
0.25, 3, CFRP, 0., Ply-1
0.25, 3, CFRP, 45., Ply-2
0.25, 3, CFRP, -45., Ply-3
0.25, 3, CFRP, 90., Ply-4
*End Part
**
**
** ASSEMBLY
**
*Assembly, name=Assembly
**
*Instance, name=PLATE_1-1, part=plate_1
*End Instance
**
*End Assembly
**
** MATERIALS
**
*Material, name=CFRP
*Elastic
165000., 0.318
** ----------------------------------------------------------------
**
** STEP: load
**
*Step, name=load, nlgeom=YES, inc=100000
*Static
1., 1., 1e-25, 1.
**
** BOUNDARY CONDITIONS
**
** Name: BC-1 Type: Symmetry/Antisymmetry/Encastre
*Boundary
PLATE_1-1.left, ENCASTRE
** Name: BC-2 Type: Displacement/Rotation
*Boundary
PLATE_1-1.right, 1, 1, 1.
**
** OUTPUT REQUESTS
**
*Restart, write, frequency=0
**
** FIELD OUTPUT: F-Output-1
**
*Output, field, number interval=10
*Node Output
COORD, U
*Element Output, directions=YES
EVOL, IVOL, LE, S
**
** HISTORY OUTPUT: H-Output-4
**
*Output, history
*Element Output, elset=PLATE_1-1.all
E11, E12, E22
**
** HISTORY OUTPUT: H-Output-3
**
*Node Output, nset=PLATE_1-1.right
RF1, U1, U2
**
** HISTORY OUTPUT: H-Output-1
**
*Output, history, variable=PRESELECT
*End Step
